A := [1, 1.5, 2; 2.5, 3, 3.5; 4, 4.5, 5]
V1 := [3; 3.5; 4]
B := [4, 4.5, 5; 5.5, 6, 6.5; 7, 7.5, 8]
V2 := [7; 7.5; 8]
A + B = [5, 6, 7; 8, 9, 10; 11, 12, 13]
A*B = [26.25, 28.5, 30.75; 51, 55.5, 60; 75.75, 82.5, 89.25]
A*V1 = [16.25; 32; 47.75]
A*V1 = [16.25; 32; 47.75]
transpose(V1)*V2 = 79.25
transpose(V1)*A*V2 = 747.75
V1×V2 = [-2; 4; -2]
V1*V2 = 79.25
p := [2; 2.5; 3]
[p(0)*sin(p(1))*cos(p(2)); p(0)*sin(p(1))*sin(p(2)); p(0)*cos(p(1))] = [-1.18497; 0.168913; -1.60229]
|V1| = 6.10328
V1/|V1|*V2/|V2| = 0.998095
